<?xml version="1.0"?>


<piston_engine name="Bristol Hercules">
    <injected>1</injected>
    <minmp unit="INHG">          6.0 </minmp>
    <maxmp unit="INHG">         40.0 </maxmp>
    <displacement unit="IN3"> 2804.00 </displacement>
    <maxhp>        2100.00 </maxhp>
    <cycles>         2.0 </cycles>
    <idlerpm>      1000.0 </idlerpm>
    <maxthrottle>    1.0 </maxthrottle>
    <minthrottle>    0.2</minthrottle>
    <numboostspeeds>2</numboostspeeds>
    <!--<takeoffboost>18</takeoffboost>-->
    <ratedboost1>9</ratedboost1>          <!--must be Fixed-->
    <ratedpower1>2100</ratedpower1> <!--must be Fixed-->
    <ratedrpm1>2600</ratedrpm1><!--must be Fixed-->
    <ratedatitude1>7000</ratedatitude1><!--must be Fixed-->
    <ratedboost2>12</ratedboost2><!--must be Fixed-->
    <ratedpower2>2100</ratedpower2><!--must be Fixed-->
    <ratedrpm2>2600</ratedrpm2><!--must be Fixed-->
    <ratedatitude2>21000</ratedatitude2><!--must be Fixed-->
</piston_engine>
