<?xml version="1.0"?>

<!--Copied From F4U-7 of Gerard Robin-->


 <propeller name="Rotol-4-Blades">
  <ixx>36.8075</ixx>
  <diameter unit="IN">160.0</diameter>
  <numblades>4</numblades>
  <gearratio>1.99</gearratio>
  <minpitch>12</minpitch>
  <maxpitch>55</maxpitch>
  <minrpm>1126</minrpm>
  <maxrpm>1407</maxrpm>
  <table name="C_THRUST" type="internal">
   <tableData>
        000012	000015	000020	000025	000030	000035	000040	000045	000050	000055
        0.0	0.0768	0.0868	0.0968	0.1068	0.1168	0.1268	0.1368	0.1378	0.1478	0.1578
        0.1	0.0683	0.0807	0.0941	0.1068	0.1168	0.1268	0.1368	0.1378	0.1478	0.1578
        0.2	0.0598	0.0734	0.0885	0.1068	0.1168	0.1268	0.1368	0.1378	0.1478	0.1578
        0.3	0.0489	0.0642	0.0819	0.1068	0.1168	0.1268	0.1368	0.1378	0.1478	0.1578
        0.4	0.0384	0.0538	0.0719	0.0997	0.1168	0.1268	0.1368	0.1378	0.1495	0.1578
        0.5	0.0265	0.0428	0.0625	0.0914	0.1168	0.1268	0.1368	0.1378	0.1519	0.1578
        0.6	0.0128	0.0306	0.0526	0.0819	0.1124	0.1268	0.1368	0.1342	0.1519	0.1578
        0.7	-0.0032	0.0165	0.0415	0.0712	0.1035	0.1268	0.1368	0.1320	0.1495	0.1578
        0.8	-0.0177	0.0031	0.0299	0.0617	0.0952	0.1219	0.1368	0.1306	0.1478	0.1578
        1.0	-0.0363	-0.0183	0.0055	0.0374	0.0711	0.1078	0.1368	0.1248	0.1462	0.1578
        1.2	-0.0608	-0.0397	-0.0111	0.0137	0.0470	0.0846	0.1315	0.1197	0.1437	0.1569
        1.4	-0.0854	-0.0611	-0.0277	-0.0119	0.0203	0.0578	0.1064	0.1161	0.1380	0.1551
        1.6	-0.1099	-0.0826	-0.0443	-0.0356	-0.0063	0.0317	0.0783	0.1088	0.1355	0.1533
        1.8	-0.1345	-0.1040	-0.0609	-0.0594	-0.0317	0.0049	0.0532	0.0907	0.1355	0.1533
        2.0	-0.1590	-0.1254	-0.0775	-0.0831	-0.0571	-0.0211	0.0266	0.0689	0.1248	0.1578
        2.2	-0.1942	-0.1529	-0.0941	-0.1068	-0.0825	-0.0493	0.0000	0.0435	0.1068	0.1614
        2.4	-0.2348	-0.1834	-0.1107	-0.1306	-0.1079	-0.0775	-0.0266	0.0181	0.0838	0.1524
        2.6	-0.2668	-0.2140	-0.1383	-0.1602	-0.1365	-0.1092	-0.0608	-0.0145	0.0600	0.1353
        2.8	-0.2988	-0.2446	-0.1660	-0.1899	-0.1651	-0.1409	-0.0950	-0.0472	0.0329	0.1145
        3.0	-0.3308	-0.2752	-0.1937	-0.2196	-0.1937	-0.1726	-0.1292	-0.0798	0.0041	0.0947
        3.2	-0.3628	-0.3057	-0.2213	-0.2493	-0.2222	-0.2043	-0.1634	-0.1124	-0.0205	0.0676
   </tableData>
  </table>

  <table name="C_POWER" type="internal">
   <tableData>
        000012	000015	000020	000025	000030	000035	000040	000045	000050	000055
        0.0	0.0893	0.0993	0.1143	0.1293	0.1443	0.1593	0.1743	0.1893	0.2043	0.2193
        0.1	0.0893	0.0993	0.1143	0.1264	0.1443	0.1559	0.1743	0.1893	0.2043	0.2193
        0.2	0.0856	0.0977	0.1143	0.1244	0.1358	0.1546	0.1737	0.1893	0.2043	0.2193
        0.3	0.0819	0.0960	0.1143	0.1214	0.1358	0.1492	0.1719	0.1846	0.2043	0.2237
        0.4	0.0625	0.0861	0.1118	0.1204	0.1358	0.1458	0.1677	0.1846	0.2066	0.2237
        0.5	0.0454	0.0745	0.1042	0.1204	0.1401	0.1424	0.1648	0.1799	0.2080	0.2237
        0.6	0.0372	0.0662	0.0953	0.1194	0.1401	0.1356	0.1618	0.1751	0.2066	0.2237
        0.7	0.0030	0.0464	0.0864	0.1124	0.1401	0.1356	0.1570	0.1704	0.1989	0.2237
        0.8	-0.0216	0.0248	0.0661	0.1025	0.1358	0.1390	0.1677	0.1657	0.1939	0.2224
        1.0	-0.0700	-0.0166	0.0279	0.0746	0.1189	0.1356	0.1677	0.1538	0.1862	0.2193
        1.2	-0.1199	-0.0579	-0.0089	0.0348	0.0892	0.1187	0.1677	0.1515	0.1803	0.2150
        1.4	-0.1697	-0.0993	-0.0457	-0.0050	0.0509	0.0949	0.1438	0.1515	0.1771	0.2106
        1.6	-0.2196	-0.1407	-0.0826	-0.0448	0.0042	0.0610	0.1198	0.1373	0.1748	0.2101
        1.8	-0.2680	-0.1821	-0.1207	-0.0945	-0.0509	0.0271	0.0929	0.1183	0.1794	0.2106
        2.0	-0.3164	-0.2235	-0.1588	-0.1343	-0.1019	-0.0068	0.0599	0.0994	0.1680	0.2193
        2.2	-0.3648	-0.2649	-0.1969	-0.1741	-0.1528	-0.0407	0.0240	0.0805	0.1544	0.2237
        2.4	-0.4132	-0.3063	-0.2350	-0.2139	-0.2038	-0.0746	-0.0120	0.0331	0.1271	0.2128
        2.6	-0.4728	-0.3560	-0.2795	-0.2587	-0.2547	-0.1085	-0.0479	0.0000	0.0976	0.1974
        2.8	-0.5249	-0.4056	-0.3303	-0.3084	-0.3057	-0.1424	-0.0839	-0.0379	0.0590	0.1799
        3.0	-0.5770	-0.4553	-0.3811	-0.3582	-0.3566	-0.1763	-0.1198	-0.0757	0.0272	0.1535
        3.2	-0.6663	-0.5215	-0.4319	-0.4079	-0.4075	-0.2102	-0.1558	-0.1136	-0.0182	0.1228
   </tableData>
  </table>

 </propeller>
