<?xml version="1.0"?>
<?xml-stylesheet type="text/xsl" href="http://jsbsim.sourceforge.net/JSBSim.xsl"?>
<fdm_config name="Nord-2502    from Aeromatic" version="2.0" release="ALPHA"
   xmlns:xsi="http://www.w3.org/2001/XMLSchema-instance"
   xsi:noNamespaceSchemaLocation="http://jsbsim.sourceforge.net/JSBSim.xsd">


 <fileheader>
  <author> Aeromatic v 0.9 </author>
  <filecreationdate> 09-06-2007 </filecreationdate>
  <version> 0.2 </version>
  <description> Nord 2502 Noratlas </description>
  <documentation>
Specifications (Nord N-2501)
General characteristics

    * Crew: 4-5
    * Capacity: 45 soldiers, 36 paratroopers, 18 patients with medics, or cargo
    * Length: 72 ft 1 in (21.96 m)
    * Wingspan: 106 ft 8 in (32.5 m)
    * Height: 19 ft 8 in (6.0 m)
    * Wing area: 1089 ft² (101.2 m²)
    * Empty weight: 28,825 lb (13,075 kg)
    * Useful load: 18,647 lb (8,458 kg)
    * Max takeoff weight: 48,500 lb (22,000 kg)
    * Powerplant: 2× SNECMA-manufactured Bristol Hercules 738/739 radial engine, 2,040 hp (1,520 kW) each


Performance

    * Maximum speed: 251 mph (405 km/h) under full load
    * Cruise speed: 199 mph (320 km/h) at 1,500 meters
    * Range: 1,550 mi (2,500 km)
    * Service ceiling: 23,300 ft (7,100 m)
    * Rate of climb: 1,080 ft/min (5.5 m/s)

    Empty weight	13300 kg
    Gross weight	21700 kg
    Max speed	405 km/h at 1500 m
    Cruise speed	320 km/h at 1500 m
    Ceiling	7100 m
    Climb	6 m/sec
    Take-off field	810 m
    Landing field	420 m
    Engines	2 SNECMA-Bristol Hercules 738/739/758/759 of 2040 hp each

    Nord 2501D
    Production version for the German Air Force, replaced some systems components of the N2501 with their equivalent from German manufacturers, 186 built (25 French built and 116 German built).

    Nord 2502A
    Civil version for UAT with two Turbomeca Marboré II turbojets and two Bristol Hercules 758/759 turboprops of 1650 hp each, five built and two conversions from N2501A.

    Nord 2504
    Modification of the Nord 2502 intended for antisubmarine warfare role with the French Navy, 24 ordered but only one built.


</documentation>
 </fileheader>


<metrics>
   <wingarea  unit="FT2"> 1087.27 </wingarea>
   <wingspan  unit="FT" >  110.24 </wingspan>
   <wing_incidence>          2.00 </wing_incidence>
   <chord     unit="FT" >    12.10 </chord>
   <htailarea unit="FT2">  177 </htailarea>
   <htailarm  unit="FT" >   42</htailarm>
   <vtailarea unit="FT2">  119.47</vtailarea>
   <vtailarm  unit="FT" >   42</vtailarm>

   <location name="AERORP" unit="IN">
     <x> 17.00 </x>
     <y>   0.00 </y>
     <z>   61 </z>
   </location>
   <location name="EYEPOINT" unit="IN">
     <x>  60.55 </x>
     <y> -32.00 </y>
     <z>  80.00 </z>
   </location>
   <location name="VRP" unit="IN">
     <x>0</x>
     <y>0</y>
     <z>0</z>
   </location>
 </metrics>

 <mass_balance>
   <ixx unit="SLUG*FT2">    294010 </ixx>
   <iyy unit="SLUG*FT2">    141906 </iyy>
   <izz unit="SLUG*FT2">    433711 </izz>
   <ixy unit="SLUG*FT2">         0 </ixy>
   <ixz unit="SLUG*FT2">         0 </ixz>
   <iyz unit="SLUG*FT2">         0 </iyz>
   <emptywt unit="LBS" >     28900 </emptywt>
   <location name="CG" unit="IN">
     <x> 14.00 </x>
     <y>   0.00 </y>
     <z> -20 </z>
   </location>
    <pointmass name="FRET">
        <weight unit="LBS"> 3000 </weight>
        <location name="POINTMASS" unit="IN">
            <x> 14 </x>
            <y> 0 </y>
            <z> -30 </z>
        </location>
    </pointmass>
 </mass_balance>


 <ground_reactions>

  <contact type="BOGEY" name="NOSE">
   <location unit="IN">
     <x>-225.83858 </x>
     <y>   0.00 </y>
     <z>-95.404331 </z>
   </location>
   <static_friction>  0.80 </static_friction>
   <dynamic_friction> 0.50 </dynamic_friction>
   <rolling_friction> 0.02 </rolling_friction>
   <spring_coeff unit="LBS/FT">   15214    </spring_coeff>
   <damping_coeff unit="LBS/FT/SEC">  5071 </damping_coeff>
   <max_steer unit="DEG"> 5.00 </max_steer>
   <brake_group>NONE</brake_group>
   <retractable>1</retractable>
 </contact>

  <contact type="BOGEY" name="LEFT_MAIN">
   <location unit="IN">
     <x> 25.275591</x>
     <y> -153.93504 </y>
     <z> -95.199606 </z>
   </location>
   <static_friction>  0.80 </static_friction>
   <dynamic_friction> 0.50 </dynamic_friction>
   <rolling_friction> 0.02 </rolling_friction>
   <spring_coeff unit="LBS/FT">      50715.00 </spring_coeff>
   <damping_coeff unit="LBS/FT/SEC"> 10143.00 </damping_coeff>
   <max_steer unit="DEG">0</max_steer>
   <brake_group>LEFT</brake_group>
   <retractable>1</retractable>
 </contact>

  <contact type="BOGEY" name="RIGHT_MAIN">
   <location unit="IN">
     <x> 25.275591</x>
     <y> 153.93504 </y>
     <z> -95.199606 </z>
   </location>
   <static_friction>  0.80 </static_friction>
   <dynamic_friction> 0.50 </dynamic_friction>
   <rolling_friction> 0.02 </rolling_friction>
   <spring_coeff unit="LBS/FT">      50715.00 </spring_coeff>
   <damping_coeff unit="LBS/FT/SEC"> 10143.00 </damping_coeff>
   <max_steer unit="DEG">0</max_steer>
   <brake_group>RIGHT</brake_group>
   <retractable>1</retractable>
 </contact>
    <contact type="BOGEY" name="W_LEFT">
            <location unit="IN">
            <x> 75.944882 </x>
            <y> -642.63386</y>
            <z> 66.322835 </z>
            </location>
            <static_friction> 0.2 </static_friction>
            <dynamic_friction> 0.2 </dynamic_friction>
            <rolling_friction> 0.2 </rolling_friction>
            <spring_coeff unit="LBS/FT"> 100 </spring_coeff>
            <damping_coeff unit="LBS/FT/SEC"> 20000 </damping_coeff>
            <max_steer unit="DEG"> 0.0 </max_steer>
            <brake_group> NONE </brake_group>
            <retractable>0</retractable>
        </contact>
        <contact type="BOGEY" name="W_RIGHT">
            <location unit="IN">
            <x> 75.944882 </x>
            <y> 642.63386</y>
            <z> 66.322835 </z>
            </location>
            <static_friction> 0.2 </static_friction>
            <dynamic_friction> 0.2 </dynamic_friction>
            <rolling_friction> 0.2 </rolling_friction>
            <spring_coeff unit="LBS/FT"> 100 </spring_coeff>
            <damping_coeff unit="LBS/FT/SEC"> 20000 </damping_coeff>
            <max_steer unit="DEG"> 0.0 </max_steer>
            <brake_group> NONE </brake_group>
            <retractable>0</retractable>
        </contact>
        <contact type="BOGEY" name="BELLY">
            <location unit="IN">
                <x>-85</x>
                <y> 0 </y>
                <z> -61.968504 </z>
            </location>
            <static_friction> 0.2 </static_friction>
            <dynamic_friction> 0.2 </dynamic_friction>
            <rolling_friction> 0.2 </rolling_friction>
            <spring_coeff unit="LBS/FT"> 100000 </spring_coeff>
            <damping_coeff unit="LBS/FT/SEC"> 3000 </damping_coeff>
            <max_steer unit="DEG"> 0.0 </max_steer>
            <brake_group> NONE </brake_group>
            <retractable>0</retractable>
        </contact>
        <contact type="BOGEY" name="NOSE">
            <location unit="IN">
                <x> -264.96063 </x>
                <y> 0 </y>
                <z> 23.599409 </z>
            </location>
            <static_friction> 0.2 </static_friction>
            <dynamic_friction> 0.2 </dynamic_friction>
            <rolling_friction> 0.2 </rolling_friction>
            <spring_coeff unit="LBS/FT"> 100000 </spring_coeff>
            <damping_coeff unit="LBS/FT/SEC"> 2000 </damping_coeff>
            <max_steer unit="DEG"> 0.0 </max_steer>
            <brake_group> NONE </brake_group>
            <retractable>0</retractable>
        </contact>
        <contact type="BOGEY" name="TAIL">
            <location unit="IN">
                <x> 495.98819</x>
                <y> 0 </y>
                <z> 6.9980315</z>
            </location>
            <static_friction> 0.2 </static_friction>
            <dynamic_friction> 0.2 </dynamic_friction>
            <rolling_friction> 0.2 </rolling_friction>
            <spring_coeff unit="LBS/FT"> 100000 </spring_coeff>
            <damping_coeff unit="LBS/FT/SEC"> 2000 </damping_coeff>
            <max_steer unit="DEG"> 0.0 </max_steer>
            <brake_group> NONE </brake_group>
            <retractable>0</retractable>
        </contact>

 </ground_reactions>

 <propulsion>

   <engine file="Bristol-739">
    <location unit="IN">
      <x> -112.35748</x>
      <y> -165.24724 </y>
      <z> 38.772047 </z>
    </location>
    <orient unit="DEG">
      <pitch> 0.00 </pitch>
      <roll>   0.00 </roll>
      <yaw>   0.00 </yaw>
    </orient>
    <feed>0</feed>
     <feed>1</feed>
    <thruster file="Rotol">
     <location unit="IN">
       <x> -112.35748 </x>
       <y> -165.24724 </y>
       <z> 38.772047 </z>
     </location>
     <orient unit="DEG">
       <pitch> 0.00 </pitch>
       <roll>   0.00 </roll>
       <yaw>   0.00 </yaw>
     </orient>
     <sense> -1 </sense>
    <p_factor> 60</p_factor>
    </thruster>
  </engine>

   <engine file="Bristol-739">
    <location unit="IN">
      <x> -112.35748 </x>
      <y> 165.24724 </y>
      <z> 38.772047 </z>
    </location>
    <orient unit="DEG">
      <pitch> 0.00 </pitch>
      <roll>   0.00 </roll>
      <yaw>   0.00 </yaw>
    </orient>
     <feed>0</feed>
    <feed>1</feed>
    <thruster file="Rotol">
     <location unit="IN">
       <x> -112.35748 </x>
       <y> 165.24724 </y>
       <z> 38.772047 </z>
     </location>
     <orient unit="DEG">
       <pitch> 0.00 </pitch>
       <roll>   0.00 </roll>
       <yaw>   0.00 </yaw>
     </orient>
     <sense> -1 </sense>
     <p_factor> 60</p_factor>
    </thruster>
  </engine>

   <engine file="MarboreII">
    <location unit="IN">
      <x> 75.944882 </x>
      <y> -642.63386</y>
      <z> 66.322835 </z>
    </location>
    <orient unit="DEG">
      <pitch> 0.00 </pitch>
      <roll>   0.00 </roll>
      <yaw>   0.00 </yaw>
    </orient>
    <feed>2</feed>
     <feed>3</feed>
    <thruster file="direct">
     <location unit="IN">
       <x> 75.944882 </x>
       <y> -642.63386 </y>
       <z> 66.322835 </z>
     </location>
     <orient unit="DEG">
       <pitch> 0.00 </pitch>
       <roll>   0.00 </roll>
       <yaw>   0.00 </yaw>
     </orient>
    </thruster>
  </engine>

   <engine file="MarboreII">
    <location unit="IN">
      <x> 75.944882 </x>
      <y> 642.63386 </y>
      <z> 66.322835 </z>
    </location>
    <orient unit="DEG">
      <pitch> 0.00 </pitch>
      <roll>   0.00 </roll>
      <yaw>   0.00 </yaw>
    </orient>
     <feed>2</feed>
    <feed>3</feed>
    <thruster file="direct">
     <location unit="IN">
       <x> 75.944882 </x>
       <y> 642.63386 </y>
       <z> 66.322835 </z>
     </location>
     <orient unit="DEG">
       <pitch> 0.00 </pitch>
       <roll>   0.00 </roll>
       <yaw>   0.00 </yaw>
     </orient>
    </thruster>
  </engine>

  <tank type="FUEL" number="1">
     <location unit="IN">
       <x> 0.0 </x>
       <y>   0.00 </y>
       <z> 60</z>
     </location>
     <capacity unit="LBS"> 6000 </capacity>
     <contents unit="LBS"> 3000 </contents>
  </tank>

  <tank type="FUEL" number="2">
     <location unit="IN">
       <x> 0.0 </x>
       <y>   0.00 </y>
       <z> 60 </z>
     </location>
     <capacity unit="LBS"> 6000 </capacity>
     <contents unit="LBS"> 3000 </contents>
  </tank>

  <tank type="FUEL" number="3">
     <location unit="IN">
       <x> 0.0 </x>
       <y>   0.00 </y>
       <z> -50 </z>
     </location>
     <capacity unit="LBS"> 1000 </capacity>
     <contents unit="LBS"> 500 </contents>
  </tank>

  <tank type="FUEL" number="4">
     <location unit="IN">
       <x> 0.0 </x>
       <y>   0.00 </y>
       <z> -21.63 </z>
     </location>
     <capacity unit="LBS"> 1000</capacity>
     <contents unit="LBS"> 500 </contents>
  </tank>


 </propulsion>

 <flight_control name="FCS: Nord 2502">

	<property>fcs/ar-latd-porte-cmd-norm</property>
	<property>fcs/ar-latg-porte-cmd-norm</property>
	<property>fcs/ar-porte-cmd-norm</property>
	<property>fcs/cutoff-switch</property>

  <channel name="Pitch">

   <summer name="Pitch Trim Sum">
      <input>fcs/elevator-cmd-norm</input>
      <input>fcs/pitch-trim-cmd-norm</input>
      <clipto>
        <min> -1 </min>
        <max>  1 </max>
      </clipto>
      <output>fcs/elevator-pos-norm</output>
   </summer>

   <aerosurface_scale name="Elevator Control">
      <input>fcs/pitch-trim-sum</input>
      <range>
        <min> -0.35 </min>
        <max>  0.30 </max>
      </range>
      <output>fcs/elevator-pos-rad</output>
   </aerosurface_scale>


  </channel>

  <channel name="Roll">

      <summer name="Roll Trim Sum">
            <input>fcs/aileron-cmd-norm</input>
            <input>fcs/roll-trim-cmd-norm</input>
            <clipto>
                <min>-1</min>
                <max>1</max>
            </clipto>
            <output>fcs/aileron-pos-norm</output>
        </summer>

        <pure_gain name="Aileron Position">
            <input>fcs/aileron-pos-norm</input>
            <gain>1</gain>
            <output>/surface-positions/aileron-pos-norm</output>
        </pure_gain>

   <aerosurface_scale name="Left Aileron Control">
      <input>fcs/roll-trim-sum</input>
      <range>
        <min> -0.20 </min>
        <max>  0.20 </max>
      </range>
      <output>fcs/left-aileron-pos-rad</output>
   </aerosurface_scale>

   <aerosurface_scale name="Right Aileron Control">
      <input>fcs/roll-trim-sum</input>
      <range>
        <min> -0.20 </min>
        <max>  0.20 </max>
      </range>
      <output>fcs/right-aileron-pos-rad</output>
   </aerosurface_scale>

  </channel>

  <channel name="Yaw">
   <summer name="Rudder Command Sum">
      <input>fcs/rudder-cmd-norm</input>
      <input>fcs/yaw-trim-cmd-norm</input>
      <limit>
        <min> -0.27 </min>
        <max>  0.27 </max>
      </limit>
      <output>fcs/rudder-pos-norm</output>
   </summer>

   <aerosurface_scale name="Rudder Control">
      <input>fcs/rudder-command-sum</input>
      <range>
        <min> -0.35 </min>
        <max>  0.35 </max>
      </range>
      <output>fcs/rudder-pos-rad</output>
   </aerosurface_scale>

  </channel>

  <channel name="Flaps">
   <kinematic name="Flaps Control">
     <input>fcs/flap-cmd-norm</input>
     <traverse>
       <setting>
          <position>  0 </position>
          <time>      0 </time>
       </setting>
       <setting>
          <position> 10 </position>
          <time>      6 </time>
       </setting>
       <setting>
          <position> 20 </position>
          <time>      6 </time>
       </setting>
       <setting>
          <position> 30 </position>
          <time>      6 </time>
       </setting>
       <setting>
          <position> 40 </position>
          <time>      6 </time>
       </setting>
     </traverse>
     <output>fcs/flap-pos-deg</output>
   </kinematic>

   <aerosurface_scale name="Flap Position Normalizer">
            <input>fcs/flaps-control</input>
            <domain>
                    <min>0</min>
                    <max>40</max>
            </domain>
            <range>
                    <min>0</min>
                    <max>1</max>
            </range>
            <output>fcs/flap-pos-norm</output>
    </aerosurface_scale>

  </channel>

  <channel name="Landing Gear">

   <switch name="Gear Switch">
                <default value="/controls/gear/gear-down"/>
                <test  logic="AND" value="0">
                    /environment/terrain  == 0
                    position/h-agl-ft lt 40
                    position/h-sl-ft  lt position/h-agl-ft
                </test>
                <output>gear/gear-cp-cmd-norm</output>
            </switch>
            <kinematic name="Gear Control">
                <input>gear/gear-cp-cmd-norm</input>
                <traverse>
                    <setting>
                        <position>0</position>
                        <time>0</time>
                    </setting>
                    <setting>
                        <position>1</position>
                        <time>0.3</time>
                    </setting>
                </traverse>
                <output>gear/gear-pos-norm</output>
            </kinematic>

            <kinematic name="Gear Surface Position">
                <input>/controls/gear/gear-down</input>
                <traverse>
                    <setting>
                        <position>0</position>
                        <time>0</time>
                    </setting>
                    <setting>
                        <position>1</position>
                        <time>5</time>
                    </setting>
                </traverse>
                <output>/surface-positions/gear-pos-norm</output>
            </kinematic>
            <switch name="Drag Terrain Factor Switch">
                <default value="0"/>
                <test  logic="AND" value="1">
                    /environment/terrain  == 1
                    /position/altitude-agl-ft lt 7
                    gear/gear-pos-norm == 0
                </test>
            </switch>
            <switch name="Drag Gear In Water Switch">
                <default value="0"/>
                <test  logic="AND" value="1">
                    /environment/terrain  == 0
                    /position/altitude-agl-ft lt 8
                    /surface-positions/gear-pos-norm == 1
                </test>
            </switch>


   <switch  name="Wheel Rotation Factor">
        <default value="0"/>
        <test  logic="AND" value="1">
            /position/altitude-agl-ft lt 7
            gear/gear-pos-norm == 1
        </test>
    </switch>

    <pure_gain name="Wheel Rotation">
        <input>velocities/u-fps</input>
        <gain>fcs/wheel-rotation-factor</gain>
    </pure_gain>

  </channel>

  <channel name="Speedbrake">
   <kinematic name="Speedbrake Control">
     <input>fcs/speedbrake-cmd-norm</input>
     <traverse>
       <setting>
          <position> 0 </position>
          <time>     0 </time>
       </setting>
       <setting>
          <position> 1 </position>
          <time>     1 </time>
       </setting>
     </traverse>
     <output>fcs/speedbrake-pos-norm</output>
   </kinematic>

  </channel>

  <channel name="Throttle">

        <scheduled_gain name="Throttle0 Cmd Norm">
              <input>/controls/engines/engine[0]/condition</input>
            <table>
                <independentVar>/controls/engines/engine[4]/throttle</independentVar>
                <tableData>
                    0.0	0.0
                    0.8	1
                    1           1
                </tableData>
            </table>
        </scheduled_gain>

        <scheduled_gain name="Throttle2 Cmd Norm">
            <input>/controls/engines/engine[2]/condition</input>
            <table>
                <independentVar>/controls/engines/engine[4]/throttle</independentVar>
                <tableData>
                    0.0	0.0
                    0.8	0.0
                    1           1
                </tableData>
            </table>
            <output>/controls/engines/engine[2]/throttle</output>
        </scheduled_gain>

        <summer name="Throttle0">
            <input>fcs/throttle0-cmd-norm</input>
            <clipto>
                <min>0.2</min>
                <max>1.0</max>
            </clipto>
            <output>/controls/engines/engine[0]/throttle</output>
        </summer>

        <scheduled_gain name="Throttle1 Cmd Norm">
              <input>/controls/engines/engine[1]/condition</input>
            <table>
                <independentVar>/controls/engines/engine[4]/throttle</independentVar>
                <tableData>
                    0.0	0.0
                    0.8	1
                    1           1
                </tableData>
            </table>
        </scheduled_gain>

        <scheduled_gain name="Throttle3 Cmd Norm">
            <input>/controls/engines/engine[3]/condition</input>
            <table>
                <independentVar>/controls/engines/engine[4]/throttle</independentVar>
                <tableData>
                    0.0	0.0
                    0.8	0.0
                    1           1
                </tableData>
            </table>
            <output>/controls/engines/engine[3]/throttle</output>
        </scheduled_gain>

        <summer name="Throttle1">
            <input>fcs/throttle1-cmd-norm</input>
            <clipto>
                <min>0.2</min>
                <max>1.0</max>
            </clipto>
            <output>/controls/engines/engine[1]/throttle</output>
        </summer>


        <switch name="Supercharger Engage">
                <default value="0"/>
                <test  logic="OR" value="1">
                   /controls/engines/engine[0]/throttle  gt 0.98
                   /controls/engines/engine[1]/throttle  gt 0.98
                </test>
        </switch>

        <kinematic name="Supercharger Throttle Control">
            <input>fcs/supercharger-engage</input>
            <traverse>
            <setting>
                <position>0 </position>
                <time>     0 </time>
            </setting>
            <setting>
                <position> 1</position>
                <time>     300 </time>
            </setting>
            </traverse>
        </kinematic>

        <switch name="Supercharger Throttle0">
                <default value="/controls/engines/engine[0]throttle"/>
                <test  logic="AND" value="0.98">
                   fcs/supercharger-throttle-control == 1
                </test>
                <output>/controls/engines/engine[0]throttle</output>
        </switch>

        <switch name="Supercharger Throttle1">
                <default value="/controls/engines/engine[1]throttle"/>
                <test  logic="AND" value="0.98">
                   fcs/supercharger-throttle-control == 1
                </test>
                <output>/controls/engines/engine[1]throttle</output>
        </switch>

        <pure_gain name="Throttle Master Cmd">
            <input>/controls/engines/engine[4]/throttle</input>
            <gain>1</gain>
        </pure_gain>
    </channel>

<documentation>
    unactable  the prop pitch Key===remain  Constant speed Propeller
</documentation>
    <channel name="Propeller">

        <summer name="Propeller0 Pitch Cmd">
            <input>/controls/engines/engine[0]/propeller-pitch</input>
            <clipto>
                <min> 1 </min>
                <max> 1 </max>
            </clipto>
            <output>/controls/engines/engine[0]/propeller-pitch</output>
        </summer>

        <summer name="Propeller1 Pitch Cmd">
            <input>/controls/engines/engine[1]/propeller-pitch</input>
            <clipto>
                <min> 1 </min>
                <max> 1 </max>
            </clipto>
            <output>/controls/engines/engine[1]/propeller-pitch</output>
        </summer>

        <scheduled_gain name="Propeller0 Rotation">
            <input>/engines/engine[0]/thruster/rpm</input>
            <table>
                <independentVar>/engines/engine[0]/thruster/rpm</independentVar>
                <tableData>
                    0.0000	1.0000
                    1300	0.012
                </tableData>
            </table>
        </scheduled_gain>

        <scheduled_gain name="Propeller1 Rotation">
            <input>/engines/engine[1]/thruster/rpm</input>
            <table>
                <independentVar>/engines/engine[1]/thruster/rpm</independentVar>
                <tableData>
                    0.0000	1.0000
                    1300	0.012
                </tableData>
            </table>
        </scheduled_gain>
    </channel>

    <channel name="Fuel">
        <summer name="Tank Capacity">
            <input>/consumables/fuel/tank[0]level-gal_us</input>
            <input>/consumables/fuel/tank[1]level-gal_us</input>
            <input>/consumables/fuel/tank[2]level-gal_us</input>
            <input>/consumables/fuel/tank[3]level-gal_us</input>
            <clipto>
                <min>0</min>
                <max>2728</max>
            </clipto>
            <output>/consumables/fuel/total-fuel-gals</output>
        </summer>
    </channel>


    <channel name="External">
            <kinematic name="Ar Lat GPorte">
            <input>fcs/ar-latg-porte-cmd-norm</input>
            <traverse>
                    <setting>
                            <position>0</position>
                            <time>0</time>
                    </setting>
                    <setting>
                            <position>1</position>
                            <time>5</time>
                    </setting>
            </traverse>
            <output>fcs/ar-latg-porte-pos-norm</output>
            </kinematic>

            <switch name="Parachuter Cmd">
                <default value="0"/>
                <test  logic="AND" value="1">
                    fcs/ar-latg-porte-pos-norm == 1
                   /controls/jump-signal == 1
                </test>
            </switch>

            <kinematic name="Ar Lat DPorte">
            <input>fcs/ar-latd-porte-cmd-norm</input>
            <traverse>
                    <setting>
                            <position>0</position>
                            <time>0</time>
                    </setting>
                    <setting>
                            <position>1</position>
                            <time>5</time>
                    </setting>
            </traverse>
            <output>fcs/ar-latd-porte-pos-norm</output>
            </kinematic>

            <switch name="Ar G Porte Cmd Norm">
                <default value="0"/>
                <test  logic="AND" value="1">
                    fcs/ar-porte-cmd-norm == 1
                    /controls/gear/brake-parking == 1
                    velocities/vc-kts lt 10
                </test>
            </switch>

            <kinematic name="Ar GPorte">
            <input>fcs/ar-g-porte-cmd-norm</input>
            <traverse>
                    <setting>
                            <position>0</position>
                            <time>0</time>
                    </setting>
                    <setting>
                            <position>1</position>
                            <time>8</time>
                    </setting>
            </traverse>
            <output>fcs/ar-g-porte-pos-norm</output>
            </kinematic>

            <switch name="Ar D Porte Cmd Norm">
                <default value="0"/>
                <test  logic="AND" value="1">
                    fcs/ar-porte-cmd-norm == 1
                    /controls/gear/brake-parking == 1
                    velocities/vc-kts lt 10
                </test>
            </switch>

            <kinematic name="Ar DPorte">
            <input>fcs/ar-d-porte-cmd-norm</input>
            <traverse>
                    <setting>
                            <position>0</position>
                            <time>0</time>
                    </setting>
                    <setting>
                            <position>1</position>
                            <time>8</time>
                    </setting>
            </traverse>
            <output>fcs/ar-d-porte-pos-norm</output>
            </kinematic>

            <switch name="Rampe Cmd Norm">
                <default value="0"/>
                <test  logic="AND" value="1">
                    fcs/ar-porte-cmd-norm == 1
                    /controls/gear/brake-parking == 1
                    velocities/vc-kts lt 10
                </test>
            </switch>

            <kinematic name="Rampe">
            <input>fcs/rampe-cmd-norm</input>
            <traverse>
                    <setting>
                            <position>0</position>
                            <time>0</time>
                    </setting>
                    <setting>
                            <position>1</position>
                            <time>10</time>
                    </setting>
            </traverse>
            <output>fcs/rampe-pos-norm</output>
            </kinematic>


            <switch name="Av Latg Porte Cmd Norm">
                <default value="0"/>
                <test  logic="AND" value="1">
                    /controls/gear/brake-parking == 1
                    velocities/vc-kts lt 10
                </test>
            </switch>

            <kinematic name="Av Lat GPorte">
            <input>fcs/av-latg-porte-cmd-norm</input>
            <traverse>
                    <setting>
                            <position>0</position>
                            <time>0</time>
                    </setting>
                    <setting>
                            <position>1</position>
                            <time>7</time>
                    </setting>
            </traverse>
            <output>fcs/av-latg-porte-pos-norm</output>
            </kinematic>


    </channel>

     <channel name="Electric Master">
        <summer name="Electric Master Switch">
            <input>/controls/electric/master-switch</input>
            <clipto>
                <min>0.0000</min>
                <max>1.0000</max>
            </clipto>
        </summer>

        <switch name="Master Switch">
            <default value="0"/>
            <test  logic="OR" value="1">
                /controls/engines/engine[0]/magnetos gt 0
                /controls/engines/engine[1]/magnetos gt 0
            </test>
            <output>/controls/electric/master-switch</output>
        </switch>


        <switch name="Battery Switch">
            <default value="0"/>
            <test  logic="AND" value="1">
                /controls/electric/master-switch == 1
            </test>
            <output>/controls/electric/battery-switch</output>
        </switch>

        <switch name="External Power">
            <default value="0"/>
            <test  logic="AND" value="1">
                /controls/electric/master-switch == 1
            </test>
            <output>/controls/electric/external-power</output>
        </switch>

        <switch name="Engine0 Master Bat">
            <default value="0"/>
            <test  logic="AND" value="1">
                /controls/electric/master-switch == 1
            </test>
            <output>/controls/engines/engine[0]/master-bat</output>
        </switch>

        <switch name="Engine1 Master Bat">
            <default value="0"/>
            <test  logic="AND" value="1">
                /controls/electric/master-switch == 1
            </test>
            <output>/controls/engines/engine[1]/master-bat</output>
        </switch>

        <switch name="Engine2 Master Bat">
            <default value="0"/>
            <test  logic="AND" value="1">
                /controls/electric/master-switch == 1
            </test>
            <output>/controls/engines/engine[2]/master-bat</output>
        </switch>

        <switch name="Engine3 Master Bat">
            <default value="0"/>
            <test  logic="AND" value="1">
                /controls/electric/master-switch == 1
            </test>
            <output>/controls/engines/engine[3]/master-bat</output>
        </switch>

        <switch name="Master Avionics">
            <default value="0"/>
            <test  logic="AND" value="1">
                /controls/electric/master-switch == 1
            </test>
            <output>/controls/switches/master-avionics</output>
        </switch>

        <switch name="Instruments Factor">
            <default value="0"/>
            <test  logic="AND" value="1">
                /controls/electric/master-switch == 1
                /systems/electrical/outputs/instrument-lights gt 24
            </test>
        </switch>

        <pure_gain name="Instruments Lighting">
            <input>fcs/instruments-factor</input>
            <gain>fcs/lighting-instruments-norm</gain>
            <output>/controls/lighting/instruments-norm</output>
        </pure_gain>

    </channel>

    <channel name="Outdoor Lighting">

        <switch name="Landing Light">
            <default value="0"/>
            <test logic="AND" value="1">
                /surface-positions/gear-pos-norm  == 1

                /systems/electrical/outputs/landing-light  gt 24
            </test>
        </switch>

        <switch name="blinker-sw">
            <default value="/instrumentation/lights/blinker-kinemat-in"/>
            <test logic="AND" value="1">
                /instrumentation/lights/blinker-kinemat-in == 0
                /instrumentation/lights/blinker-kinemat-out == 0
            </test>
            <test logic="AND" value="0">
                /instrumentation/lights/blinker-kinemat-in == 1
                /instrumentation/lights/blinker-kinemat-out == 1
            </test>
            <output>/instrumentation/lights/blinker-kinemat-in</output>
        </switch>

        <kinematic name="blinker-norm">
            <input>/instrumentation/lights/blinker-kinemat-in</input>
            <traverse>
                <setting>
                    <position>0</position>
                    <time>0</time>
                </setting>
                <setting>
                    <position>1</position>
                    <time>1</time>
                </setting>
            </traverse>
            <output>/instrumentation/lights/blinker-kinemat-out</output>
        </kinematic>

        <switch name="beacon-sw">
            <default value="0"/>
            <test logic="AND" value="1">
                /instrumentation/lights/blinker-kinemat-out > 0.90
                /instrumentation/lights/blinker-kinemat-out lt 0.97
            </test>
            <output>/instrumentation/lights/beacon-on</output>
        </switch>


        </channel>

        <channel name="Turbine">

            <kinematic name="Cutoff Switch Delay">
                <input>fcs/cutoff-switch</input>
                <traverse>
                    <setting>
                        <position>0.0000</position>
                        <time>0.0000</time>
                    </setting>
                    <setting>
                        <position>1.0000</position>
                        <time>1.0000</time>
                    </setting>
                </traverse>
            </kinematic>

            <switch name="Fuel Pump2 Cmd">
                <default value="0"/>
                <test  logic="AND" value="1">
                    fcs/cutoff-switch == 1
                </test>
            </switch>
            <pure_gain name="Fuel Pump2">
                <input>fcs/fuel-pump2-cmd</input>
                <gain>1</gain>
                <output>/controls/engines/engine[2]/fuel-pump</output>
            </pure_gain>

            <switch name="Fuel Pump3 Cmd">
                <default value="0"/>
                <test  logic="AND" value="1">
                    fcs/cutoff-switch == 1
                </test>
            </switch>
            <pure_gain name="Fuel Pump3">
                <input>fcs/fuel-pump3-cmd</input>
                <gain>1</gain>
                <output>/controls/engines/engine[3]/fuel-pump</output>
            </pure_gain>

            <switch name="Cutoff2 Cmd">
                <default value="1"/>
                <test  logic="AND" value="0">
                    fcs/cutoff-switch-delay == 1
                    fcs/fuel-pump2-cmd == 1
                </test>
                <output>/controls/engines/engine[2]/cutoff-cmd</output>
            </switch>

            <switch name="Cutoff3 Cmd">
                <default value="1"/>
                <test  logic="AND" value="0">
                    fcs/cutoff-switch-delay == 1
                    fcs/fuel-pump3-cmd == 1
                </test>
                <output>/controls/engines/engine[3]/cutoff-cmd</output>
            </switch>

    </channel>

 </flight_control>

 <aerodynamics>

     <function name="aero/function/kCLge">
            <description>Change_in_lift_due_to_ground_effect</description>
            <product>
                  <table>
                      <independentVar>aero/h_b-mac-ft</independentVar>
                      <tableData>
                          0.0000	1.2000
                          0.1000	1.1500
                          0.1500	1.0900
                          0.2000	1.0200
                          1.1000	1.0000
                      </tableData>
                  </table>
            </product>
        </function>

        <function name="aero/function/kCLpw">
        <description>Change_in_lift_due_to_propeller_wash</description>
        <product>
                <table>
                    <independentVar lookup="row" >aero/qbar-psf</independentVar>
                    <independentVar lookup="column">propulsion/engine/thrust-coefficient</independentVar>
                    <tableData>
                                        0.040  0.000
                        00.0000	  1.410  1.000
                        50.0000	  1.000  1.000
                    </tableData>
                </table>
            </product>
        </function>
<documentation>
    must be improved
    this is a try : the propellerwash effect on the wing, at low speed
    that lift effect is maximum when the qbar-psf is close to zero and propeller thrust to maximum (here 0.04)
    that effect is null when qbar-psf is 50 (100 kts) or propeller thrust close to zero
    we suppose that both engines are running
</documentation>


  <axis name="LIFT">
    <function name="aero/coefficient/CLalpha">
      <description>Lift_due_to_alpha</description>
      <product>
          <property>aero/qbar-psf</property>
          <property>metrics/Sw-sqft</property>
          <property>aero/function/kCLge</property>
           <property>aero/function/kCLpw</property>
          <table>
            <independentVar lookup="row">aero/alpha-rad</independentVar>
            <tableData>
                -0.2000	-0.6800
                -0.0900	-0.2200
                0.0000	0.2700
                0.0900	0.9300
                 0.1000	1.1300
                 0.1200	1.2500
                 0.2400	1.5500
                 0.2600	1.6400
                 0.2800	1.6700
                 0.3000	1.6300
                 0.3600	1.3500
            </tableData>
          </table>
      </product>
    </function>

    <function name="aero/coefficient/dCLflap">
       <description>Delta_Lift_due_to_flaps</description>
       <product>
           <property>aero/qbar-psf</property>
           <property>metrics/Sw-sqft</property>
           <property>fcs/flap-pos-norm</property>
            <property>aero/function/kCLpw</property>
           <value> 0.6</value>
       </product>
    </function>

    <!--<function name="aero/coefficient/dCLsb">
       <description>Delta_Lift_due_to_speedbrake</description>
       <product>
           <property>aero/qbar-psf</property>
           <property>metrics/Sw-sqft</property>
           <property>fcs/speedbrake-pos-norm</property>
           <value>-0.08</value>
       </product>
    </function>-->

    <function name="aero/coefficient/CLde">
       <description>Lift_due_to_Elevator_Deflection</description>
       <product>
           <property>aero/qbar-psf</property>
           <property>metrics/Sw-sqft</property>
           <property>fcs/elevator-pos-rad</property>
           <value>0.2</value>
       </product>
    </function>


  </axis>

  <axis name="DRAG">

    <function name="aero/coefficient/CD0">
       <description>Drag_at_zero_lift</description>
       <product>
          <property>aero/qbar-psf</property>
          <property>metrics/Sw-sqft</property>
          <table>
            <independentVar lookup="row">aero/alpha-rad</independentVar>
            <tableData>
                -1.57       1.500
                -0.26    0.022
                0.00    0.017
                0.26    0.022
                1.57       1.500
            </tableData>
          </table>
       </product>
    </function>

    <function name="aero/coefficient/CDi">
       <description>Induced_drag</description>
         <product>
           <property>aero/qbar-psf</property>
           <property>metrics/Sw-sqft</property>
           <property>aero/cl-squared</property>
           <value>0.034</value>
         </product>
    </function>

    <function name="aero/coefficient/CDmach">
       <description>Drag_due_to_mach</description>
        <product>
          <property>aero/qbar-psf</property>
          <property>metrics/Sw-sqft</property>
          <table>
            <independentVar lookup="row">velocities/mach</independentVar>
            <tableData>
                0.00      0.000
                0.79      0.000
                1.10      0.023
                1.80      0.015
            </tableData>
          </table>
        </product>
    </function>

    <function name="aero/coefficient/CDflap">
       <description>Drag_due_to_flaps</description>
         <product>
           <property>aero/qbar-psf</property>
           <property>metrics/Sw-sqft</property>
           <property>fcs/flap-pos-norm</property>
           <value>0.0500</value>
         </product>
    </function>

    <function name="aero/coefficient/CDgear">
       <description>Drag_due_to_gear</description>
         <product>
           <property>aero/qbar-psf</property>
           <property>metrics/Sw-sqft</property>
           <property>gear/gear-pos-norm</property>
           <value>0.011</value>
         </product>
    </function>

    <!--<function name="aero/coefficient/CDsb">
       <description>Drag_due_to_speedbrakes</description>
         <product>
           <property>aero/qbar-psf</property>
           <property>metrics/Sw-sqft</property>
           <property>fcs/speedbrake-pos-norm</property>
           <value>0.017</value>
         </product>
    </function>-->

    <function name="aero/coefficient/CDbeta">
       <description>Drag_due_to_sideslip</description>
       <product>
          <property>aero/qbar-psf</property>
          <property>metrics/Sw-sqft</property>
          <table>
            <independentVar lookup="row">aero/beta-rad</independentVar>
            <tableData>
              -1.57       1.230
              -0.26    0.050
               0.00       0.000
               0.26    0.050
               1.57       1.230
            </tableData>
          </table>
       </product>
    </function>

    <function name="aero/coefficient/CDde">
       <description>Drag_due_to_Elevator_Deflection</description>
       <product>
           <property>aero/qbar-psf</property>
           <property>metrics/Sw-sqft</property>
           <abs><property>fcs/elevator-pos-norm</property></abs>
           <value>0.04</value>
       </product>
    </function>

  </axis>

  <axis name="SIDE">

    <function name="aero/coefficient/CYb">
       <description>Side_force_due_to_beta</description>
       <product>
           <property>aero/qbar-psf</property>
           <property>metrics/Sw-sqft</property>
           <property>aero/beta-rad</property>
           <value>-1</value>
       </product>
    </function>

  </axis>

  <axis name="ROLL">

    <function name="aero/coefficient/Clb">
       <description>Roll_moment_due_to_beta</description>
       <product>
           <property>aero/qbar-psf</property>
           <property>metrics/Sw-sqft</property>
           <property>metrics/bw-ft</property>
           <property>aero/beta-rad</property>
           <value>-0.1</value>
       </product>
    </function>

    <function name="aero/coefficient/Clp">
       <description>Roll_moment_due_to_roll_rate</description>
       <product>
           <property>aero/qbar-psf</property>
           <property>metrics/Sw-sqft</property>
           <property>metrics/bw-ft</property>
           <property>aero/bi2vel</property>
           <property>velocities/p-aero-rad_sec</property>
           <value>-0.4</value>
       </product>
    </function>

    <function name="aero/coefficient/Clr">
       <description>Roll_moment_due_to_yaw_rate</description>
       <product>
           <property>aero/qbar-psf</property>
           <property>metrics/Sw-sqft</property>
           <property>metrics/bw-ft</property>
           <property>aero/bi2vel</property>
           <property>velocities/r-aero-rad_sec</property>
           <value>0.15</value>
       </product>
    </function>

    <function name="aero/coefficient/Clda">
       <description>Roll_moment_due_to_aileron</description>
       <product>
          <property>aero/qbar-psf</property>
          <property>metrics/Sw-sqft</property>
          <property>metrics/bw-ft</property>
          <property>fcs/left-aileron-pos-rad</property>
          <table>
            <independentVar lookup="row">velocities/mach</independentVar>
            <tableData>
              0.0    0.100
              2.0    0.033
            </tableData>
          </table>
       </product>
    </function>

    <function name="aero/coefficient/Cldr">
       <description>Roll_moment_due_to_rudder</description>
       <product>
           <property>aero/qbar-psf</property>
           <property>metrics/Sw-sqft</property>
           <property>metrics/bw-ft</property>
           <property>fcs/rudder-pos-rad</property>
           <value>0.01</value>
       </product>
    </function>

  </axis>

  <axis name="PITCH">

    <function name="aero/coefficient/Cmalpha">
       <description>Pitch_moment_due_to_alpha</description>
       <product>
           <property>aero/qbar-psf</property>
           <property>metrics/Sw-sqft</property>
           <property>metrics/cbarw-ft</property>
           <property>aero/alpha-rad</property>
           <value>-0.7</value>
       </product>
    </function>

    <function name="aero/coefficient/Cmde">
       <description>Pitch_moment_due_to_elevator</description>
       <product>
          <property>aero/qbar-psf</property>
          <property>metrics/Sw-sqft</property>
          <property>metrics/cbarw-ft</property>
          <property>fcs/elevator-pos-rad</property>
          <table>
            <independentVar lookup="row">velocities/mach</independentVar>
            <tableData>
              0.0     -1.300
              2.0     -0.325
            </tableData>
          </table>
       </product>
    </function>

    <function name="aero/coefficient/Cmdf">
       <description>Pitch_moment_due_to_flap</description>
       <product>
          <property>aero/qbar-psf</property>
          <property>metrics/Sw-sqft</property>
          <property>metrics/cbarw-ft</property>
          <property>fcs/flap-pos-deg</property>
          <table>
            <independentVar lookup="row">velocities/mach</independentVar>
            <tableData>
              0.0     0
              2.0     0.001
            </tableData>
          </table>
       </product>
    </function>


    <function name="aero/coefficient/Cmq">
       <description>Pitch_moment_due_to_pitch_rate</description>
       <product>
           <property>aero/qbar-psf</property>
           <property>metrics/Sw-sqft</property>
           <property>metrics/cbarw-ft</property>
           <property>aero/ci2vel</property>
           <property>velocities/q-aero-rad_sec</property>
           <value>-21</value>
       </product>
    </function>

    <function name="aero/coefficient/Cmadot">
       <description>Pitch_moment_due_to_alpha_rate</description>
       <product>
           <property>aero/qbar-psf</property>
           <property>metrics/Sw-sqft</property>
           <property>metrics/cbarw-ft</property>
           <property>aero/ci2vel</property>
           <property>aero/alphadot-rad_sec</property>
           <value>-4</value>
       </product>
    </function>

  </axis>

  <axis name="YAW">

    <function name="aero/coefficient/Cnb">
       <description>Yaw_moment_due_to_beta</description>
       <product>
           <property>aero/qbar-psf</property>
           <property>metrics/Sw-sqft</property>
           <property>metrics/bw-ft</property>
           <property>aero/beta-rad</property>
           <value>0.12</value>
       </product>
    </function>

    <function name="aero/coefficient/Cnr">
       <description>Yaw_moment_due_to_yaw_rate</description>
       <product>
           <property>aero/qbar-psf</property>
           <property>metrics/Sw-sqft</property>
           <property>metrics/bw-ft</property>
           <property>aero/bi2vel</property>
           <property>velocities/r-aero-rad_sec</property>
           <value>-0.15</value>
       </product>
    </function>

    <function name="aero/coefficient/Cndr">
       <description>Yaw_moment_due_to_rudder</description>
       <product>
           <property>aero/qbar-psf</property>
           <property>metrics/Sw-sqft</property>
           <property>metrics/bw-ft</property>
           <property>fcs/rudder-pos-rad</property>
           <value>-0.1</value>
       </product>
    </function>

    <function name="aero/coefficient/Cnda">
       <description>Adverse_yaw</description>
       <product>
           <property>aero/qbar-psf</property>
           <property>metrics/Sw-sqft</property>
           <property>metrics/bw-ft</property>
           <property>fcs/left-aileron-pos-rad</property>
           <value>0</value>
       </product>
    </function>

  </axis>

 </aerodynamics>

</fdm_config>
